# OpenSim document version 40000
InverseKinematicsTool Transformed_Sujet_01_velo_100:
  time_range: 0 16.55833
  output_motion_file: /Users/mathieubourgeois/Desktop/Analyse/Traitement/Sujet_01/IKResults/Transformed_Sujet_01_velo_100_ik.mot
  marker_file: /Users/mathieubourgeois/Desktop/Analyse/Traitement/Sujet_01/Data/Transformed_Sujet_01_velo_100.trc
  IKTaskSet:
    IKMarkerTask STRN: apply=true weight=1
    IKMarkerTask RSHO: apply=true weight=1
    IKMarkerTask LSHO: apply=true weight=1
    IKMarkerTask C7: apply=true weight=1
    IKMarkerTask T10: apply=true weight=1
    IKMarkerTask CLAV: apply=true weight=1
    IKMarkerTask RRAD: apply=true weight=1
    IKMarkerTask RWRB: apply=true weight=1
    IKMarkerTask RWRA: apply=true weight=1
    IKMarkerTask LRAD: apply=true weight=1
    IKMarkerTask LWRB: apply=true weight=1
    IKMarkerTask LWRA: apply=true weight=1
    IKMarkerTask RFWT: apply=true weight=1
    IKMarkerTask LFWT: apply=true weight=1
    IKMarkerTask RBWT: apply=true weight=1
    IKMarkerTask LBWT: apply=true weight=1
    IKMarkerTask RKNE: apply=true weight=1
    IKMarkerTask RANE: apply=true weight=1
    IKMarkerTask RANI: apply=true weight=1
    IKMarkerTask RHEE: apply=true weight=1
    IKMarkerTask RTOE: apply=true weight=1
    IKMarkerTask LKNE: apply=true weight=1
    IKMarkerTask LANE: apply=true weight=1
    IKMarkerTask LANI: apply=true weight=1
    IKMarkerTask LHEE: apply=true weight=1
    IKMarkerTask LTOE: apply=true weight=1
    IKMarkerTask RBHD: apply=true weight=1
    IKMarkerTask LBHD: apply=true weight=1
    IKMarkerTask RFHD: apply=true weight=1
    IKMarkerTask LFHD: apply=true weight=1
    IKMarkerTask RKNI: apply=true weight=1
    IKMarkerTask LKNI: apply=true weight=1
    IKMarkerTask RTHI: apply=true weight=1
    IKMarkerTask LTHI: apply=true weight=1
    IKMarkerTask RHUM: apply=true weight=1
    IKMarkerTask LHUM: apply=true weight=1
    IKMarkerTask RBAC: apply=true weight=1
