# OpenSim document version 40000
InverseKinematicsTool Sujet_01_velo_100:
  time_range: 0 16.567
  output_motion_file: /Users/mathieubourgeois/Desktop/AnalyseIMU/Traitement_IMU_Opensim/Sujet_01/IKResults/Sujet_01_velo_100_ik.mot
  marker_file: /Users/mathieubourgeois/Desktop/AnalyseIMU/Traitement_IMU_Opensim/Sujet_01/Data/Sujet_01_velo_100.trc
  IKTaskSet:
    IKMarkerTask pHipOrigin: apply=true weight=1
    IKMarkerTask pRightCSI: apply=true weight=1
    IKMarkerTask pLeftCSI: apply=true weight=1
    IKMarkerTask pRightIschialTub: apply=true weight=1
    IKMarkerTask pLeftIschialTub: apply=true weight=1
    IKMarkerTask pSacrum: apply=true weight=1
    IKMarkerTask pL5SpinalProcess: apply=true weight=1
    IKMarkerTask pL3SpinalProcess: apply=true weight=1
    IKMarkerTask pT12SpinalProcess: apply=true weight=1
    IKMarkerTask pPX: apply=true weight=1
    IKMarkerTask pIJ: apply=true weight=1
    IKMarkerTask pT4SpinalProcess: apply=true weight=1
    IKMarkerTask pT8SpinalProcess: apply=true weight=1
    IKMarkerTask pC7SpinalProcess: apply=true weight=1
    IKMarkerTask pTopOfHead: apply=true weight=1
    IKMarkerTask pRightAuricularis: apply=true weight=1
    IKMarkerTask pLeftAuricularis: apply=true weight=1
    IKMarkerTask pBackOfHead: apply=true weight=1
    IKMarkerTask pRightAcromion: apply=true weight=1
    IKMarkerTask pLeftAcromion: apply=true weight=1
    IKMarkerTask pRightArmLatEpicondyle: apply=true weight=1
    IKMarkerTask pRightArmMedEpicondyle: apply=true weight=1
    IKMarkerTask pLeftArmLatEpicondyle: apply=true weight=1
    IKMarkerTask pLeftArmMedEpicondyle: apply=true weight=1
    IKMarkerTask pRightUlnarStyloid: apply=true weight=1
    IKMarkerTask pRightRadialStyloid: apply=true weight=1
    IKMarkerTask pRightOlecranon: apply=true weight=1
    IKMarkerTask pLeftUlnarStyloid: apply=true weight=1
    IKMarkerTask pLeftRadialStyloid: apply=true weight=1
    IKMarkerTask pLeftOlecranon: apply=true weight=1
    IKMarkerTask pRightTopOfHand: apply=true weight=1
    IKMarkerTask pRightPinky: apply=true weight=1
    IKMarkerTask pLeftTopOfHand: apply=true weight=1
    IKMarkerTask pLeftPinky: apply=true weight=1
    IKMarkerTask pRightGreaterTrochanter: apply=true weight=1
    IKMarkerTask pRightKneeLatEpicondyle: apply=true weight=1
    IKMarkerTask pRightKneeMedEpicondyle: apply=true weight=1
    IKMarkerTask pRightPatella: apply=true weight=1
    IKMarkerTask pLeftGreaterTrochanter: apply=true weight=1
    IKMarkerTask pLeftKneeLatEpicondyle: apply=true weight=1
    IKMarkerTask pLeftKneeMedEpicondyle: apply=true weight=1
    IKMarkerTask pLeftPatella: apply=true weight=1
    IKMarkerTask pRightLatMalleolus: apply=true weight=1
    IKMarkerTask pRightMedMalleolus: apply=true weight=1
    IKMarkerTask pRightTibialTub: apply=true weight=1
    IKMarkerTask pLeftLatMalleolus: apply=true weight=1
    IKMarkerTask pLeftMedMalleolus: apply=true weight=1
    IKMarkerTask pLeftTibialTub: apply=true weight=1
    IKMarkerTask pRightHeelFoot: apply=true weight=1
    IKMarkerTask pRightFirstMetatarsal: apply=true weight=1
    IKMarkerTask pRightFifthMetatarsal: apply=true weight=1
    IKMarkerTask pRightPivotFoot: apply=true weight=1
    IKMarkerTask pRightHeelCenter: apply=true weight=1
    IKMarkerTask pRightToe: apply=true weight=1
    IKMarkerTask pLeftHeelFoot: apply=true weight=1
    IKMarkerTask pLeftFirstMetatarsal: apply=true weight=1
    IKMarkerTask pLeftFifthMetatarsal: apply=true weight=1
    IKMarkerTask pLeftPivotFoot: apply=true weight=1
    IKMarkerTask pLeftHeelCenter: apply=true weight=1
    IKMarkerTask pLeftToe: apply=true weight=1
    IKMarkerTask pRightASI: apply=true weight=1
    IKMarkerTask pLeftASI: apply=true weight=1
