# OpenSim document version 40000
ScaleTool Catelli_high_hip_flexion_V4.0-scaled:
  mass: 60 [kg]
  height: -1
  age: -1
  GenericModelMaker:
    model_file: XsensModel.osim
  ModelScaler:
    apply: true
    scaling_order: measurements manualScale
    marker_file: /Users/mathieubourgeois/Desktop/AnalyseIMU/Traitement_IMU_Opensim/Sujet_08/Static_Sujet_08_Tpose.trc
    time_range: 0.2 1.5
    preserve_mass_distribution: true
    MeasurementSet:
      Measurement R-femur: apply=true
        MarkerPair: markers=(pRightGreaterTrochanter pRightKneeLatEpicondyle)
        MarkerPair: markers=(pRightASI pRightPatella)
        BodyScale femur_r: axes=(X Y Z)
      Measurement L-femur: apply=true
        MarkerPair: markers=(pLeftGreaterTrochanter pLeftKneeLatEpicondyle)
        MarkerPair: markers=(pLeftASI pLeftPatella)
        BodyScale femur_l: axes=(X Y Z)
      Measurement R-L-ASIS: apply=false
        MarkerPair: markers=(pRightASI pLeftASI)
      Measurement R-shank: apply=true
        MarkerPair: markers=(pRightKneeLatEpicondyle pRightLatMalleolus)
        MarkerPair: markers=(pRightPatella pRightHeelFoot)
        BodyScale tibia_r: axes=(X Y Z)
      Measurement L-shank: apply=true
        MarkerPair: markers=(pLeftKneeLatEpicondyle pLeftLatMalleolus)
        MarkerPair: markers=(pLeftPatella pLeftHeelFoot)
        BodyScale tibia_l: axes=(X Y Z)
      Measurement R-foot: apply=false
        MarkerPair: markers=(pRightToe pRightHeelFoot)
      Measurement L-foot: apply=false
        MarkerPair: markers=(pLeftToe pLeftHeelFoot)
      Measurement Horizontal-torso: apply=false
        MarkerPair: markers=(pRightAcromion pLeftAcromion)
      Measurement R-heel: apply=true
        MarkerPair: markers=(pRightLatMalleolus pRightHeelFoot)
        BodyScale talus_r: axes=(X Y Z)
      Measurement L-heel: apply=true
        MarkerPair: markers=(pLeftLatMalleolus pLeftHeelFoot)
        BodyScale talus_l: axes=(X Y Z)
      Measurement Vertical-torso: apply=false
        MarkerPair: markers=(pSacrum pC7SpinalProcess)
        MarkerPair: markers=(pL3SpinalProcess pT12SpinalProcess)
        MarkerPair: markers=(pT8SpinalProcess pT4SpinalProcess)
        MarkerPair: markers=(pT12SpinalProcess pT8SpinalProcess)
        MarkerPair: markers=(pC7SpinalProcess pT4SpinalProcess)
      Measurement torso-full: apply=true
        MarkerPair: markers=(pRightASI pLeftASI)
        MarkerPair: markers=(pLeftAcromion pRightAcromion)
        BodyScale torso: axes=(X Y Z)
      Measurement R-Uarm: apply=true
        MarkerPair: markers=(pRightAcromion pRightArmLatEpicondyle)
        BodyScale humerus_r: axes=(X Y Z)
      Measurement L-Uarm: apply=true
        MarkerPair: markers=(pLeftAcromion pLeftArmLatEpicondyle)
        BodyScale humerus_l: axes=(X Y Z)
      Measurement R-Larm: apply=true
        MarkerPair: markers=(pRightArmLatEpicondyle pRightUlnarStyloid)
        BodyScale ulna_r: axes=(X Y Z)
        BodyScale radius_r: axes=(X Y Z)
      Measurement L-Larm: apply=true
        MarkerPair: markers=(pLeftArmLatEpicondyle pLeftUlnarStyloid)
        BodyScale ulna_l: axes=(X Y Z)
        BodyScale radius_l: axes=(X Y Z)
      Measurement Head: apply=false
        MarkerPair: markers=(pTopOfHead pBackOfHead)
        MarkerPair: markers=(pLeftAuricularis pRightAuricularis)
        MarkerPair: markers=(pTopOfHead pC7SpinalProcess)
      Measurement Pelvis: apply=false
        MarkerPair: markers=(pRightIschialTub pLeftIschialTub)
        MarkerPair: markers=(pHipOrigin pRightIschialTub)
        MarkerPair: markers=(pHipOrigin pLeftIschialTub)
      Measurement Pelvis2: apply=true
        MarkerPair: markers=(pHipOrigin pSacrum)
        MarkerPair: markers=(pSacrum pRightCSI)
        MarkerPair: markers=(pSacrum pLeftCSI)
        MarkerPair: markers=(pLeftCSI pLeftASI)
        MarkerPair: markers=(pRightCSI pRightASI)
        MarkerPair: markers=(pLeftASI pRightASI)
        BodyScale pelvis: axes=(X Y Z)
      Measurement R-hand: apply=true
        MarkerPair: markers=(pRightTopOfHand pRightUlnarStyloid)
        MarkerPair: markers=(pRightTopOfHand pRightRadialStyloid)
        BodyScale hand_r: axes=(X Y Z)
      Measurement L-hand: apply=true
        MarkerPair: markers=(pLeftTopOfHand pLeftUlnarStyloid)
        MarkerPair: markers=(pLeftTopOfHand pLeftRadialStyloid)
        BodyScale hand_l: axes=(X Y Z)
      Measurement R-Knee: apply=false
        MarkerPair: markers=(pRightPatella pRightTibialTub)
        MarkerPair: markers=(pRightKneeMedEpicondyle pRightKneeLatEpicondyle)
      Measurement L-Knee: apply=false
        MarkerPair: markers=(pLeftPatella pLeftTibialTub)
        MarkerPair: markers=(pLeftKneeMedEpicondyle pLeftKneeLatEpicondyle)
    ScaleSet:
      Scale: scales=(1 1 1) segment=patella_r apply=true
      Scale: scales=(1 1 1) segment=calcn_r apply=true
      Scale: scales=(1 1 1) segment=toes_r apply=true
      Scale: scales=(1 1 1) segment=patella_l apply=true
      Scale: scales=(1 1 1) segment=calcn_l apply=true
      Scale: scales=(1 1 1) segment=toes_l apply=true
  MarkerPlacer:
    apply: true
    marker_file: /Users/mathieubourgeois/Desktop/AnalyseIMU/Traitement_IMU_Opensim/Sujet_08/Static_Sujet_08_Tpose.trc
    time_range: 0.2 1.5
    output_model_file: /Users/mathieubourgeois/Desktop/AnalyseIMU/Traitement_IMU_Opensim/Sujet_08/Sujet_08_scale_model.osim
    max_marker_movement: -1
    IKTaskSet:
      IKMarkerTask pHipOrigin: apply=true weight=1
      IKMarkerTask pRightCSI: apply=true weight=1
      IKMarkerTask pLeftCSI: apply=true weight=1
      IKMarkerTask pRightIschialTub: apply=true weight=1
      IKMarkerTask pLeftIschialTub: apply=true weight=1
      IKMarkerTask pSacrum: apply=true weight=1
      IKMarkerTask pL5SpinalProcess: apply=true weight=1
      IKMarkerTask pL3SpinalProcess: apply=true weight=1
      IKMarkerTask pT12SpinalProcess: apply=true weight=1
      IKMarkerTask pPX: apply=true weight=1
      IKMarkerTask pIJ: apply=true weight=1
      IKMarkerTask pT4SpinalProcess: apply=true weight=1
      IKMarkerTask pT8SpinalProcess: apply=true weight=1
      IKMarkerTask pC7SpinalProcess: apply=true weight=1
      IKMarkerTask pTopOfHead: apply=true weight=1
      IKMarkerTask pRightAuricularis: apply=true weight=1
      IKMarkerTask pLeftAuricularis: apply=true weight=1
      IKMarkerTask pBackOfHead: apply=true weight=1
      IKMarkerTask pRightAcromion: apply=true weight=1
      IKMarkerTask pLeftAcromion: apply=true weight=1
      IKMarkerTask pRightArmLatEpicondyle: apply=true weight=1
      IKMarkerTask pRightArmMedEpicondyle: apply=true weight=1
      IKMarkerTask pLeftArmLatEpicondyle: apply=true weight=1
      IKMarkerTask pLeftArmMedEpicondyle: apply=true weight=1
      IKMarkerTask pRightUlnarStyloid: apply=true weight=1
      IKMarkerTask pRightRadialStyloid: apply=true weight=1
      IKMarkerTask pRightOlecranon: apply=true weight=1
      IKMarkerTask pLeftUlnarStyloid: apply=true weight=1
      IKMarkerTask pLeftRadialStyloid: apply=true weight=1
      IKMarkerTask pLeftOlecranon: apply=true weight=1
      IKMarkerTask pRightTopOfHand: apply=true weight=1
      IKMarkerTask pRightPinky: apply=true weight=1
      IKMarkerTask pLeftTopOfHand: apply=true weight=1
      IKMarkerTask pLeftPinky: apply=true weight=1
      IKMarkerTask pRightGreaterTrochanter: apply=true weight=1
      IKMarkerTask pRightKneeLatEpicondyle: apply=true weight=1
      IKMarkerTask pRightKneeMedEpicondyle: apply=true weight=1
      IKMarkerTask pRightPatella: apply=true weight=1
      IKMarkerTask pLeftGreaterTrochanter: apply=true weight=1
      IKMarkerTask pLeftKneeLatEpicondyle: apply=true weight=1
      IKMarkerTask pLeftKneeMedEpicondyle: apply=true weight=1
      IKMarkerTask pLeftPatella: apply=true weight=1
      IKMarkerTask pRightLatMalleolus: apply=true weight=1
      IKMarkerTask pRightMedMalleolus: apply=true weight=1
      IKMarkerTask pRightTibialTub: apply=true weight=1
      IKMarkerTask pLeftLatMalleolus: apply=true weight=1
      IKMarkerTask pLeftMedMalleolus: apply=true weight=1
      IKMarkerTask pLeftTibialTub: apply=true weight=1
      IKMarkerTask pRightHeelFoot: apply=true weight=1
      IKMarkerTask pRightFirstMetatarsal: apply=true weight=1
      IKMarkerTask pRightFifthMetatarsal: apply=true weight=1
      IKMarkerTask pRightPivotFoot: apply=true weight=1
      IKMarkerTask pRightHeelCenter: apply=true weight=1
      IKMarkerTask pRightToe: apply=true weight=1
      IKMarkerTask pLeftHeelFoot: apply=true weight=1
      IKMarkerTask pLeftFirstMetatarsal: apply=true weight=1
      IKMarkerTask pLeftFifthMetatarsal: apply=true weight=1
      IKMarkerTask pLeftPivotFoot: apply=true weight=1
      IKMarkerTask pLeftHeelCenter: apply=true weight=1
      IKMarkerTask pLeftToe: apply=true weight=1
      IKMarkerTask pRightASI: apply=true weight=1
      IKMarkerTask pLeftASI: apply=true weight=1
