# OpenSim document version 40000
ScaleTool Theia_scaled:
  mass: 69 [kg]
  height: -1
  age: -1
  GenericModelMaker:
    model_file: MarkerlessModel.osim
  ModelScaler:
    apply: true
    scaling_order: measurements manualScale
    marker_file: /Users/mathieubourgeois/Desktop/Analyse_Markerless_nomarker/Traitement_Markerless_nomarker/Sujet_08/Static_OpenSimTheia_Sujet_08_Tpose_nomarkers_filt.trc
    time_range: 0.2 1.5
    preserve_mass_distribution: true
    MeasurementSet:
      Measurement torso: apply=true
        MarkerPair: markers=(LShoulder LHip)
        MarkerPair: markers=(RShoulder RHip)
        BodyScale lumbar5: axes=(X Y Z)
        BodyScale lumbar4: axes=(X Y Z)
        BodyScale lumbar3: axes=(X Y Z)
        BodyScale lumbar2: axes=(X Y Z)
        BodyScale lumbar1: axes=(X Y Z)
        BodyScale torso: axes=(X Y Z)
      Measurement arm: apply=true
        MarkerPair: markers=(LShoulder LElbow)
        MarkerPair: markers=(RShoulder RElbow)
        BodyScale humerus_r: axes=(X Y Z)
        BodyScale humerus_l: axes=(X Y Z)
      Measurement forearm: apply=true
        MarkerPair: markers=(LElbow LWrist)
        MarkerPair: markers=(RElbow RWrist)
        BodyScale ulna_r: axes=(X Y Z)
        BodyScale radius_r: axes=(X Y Z)
        BodyScale hand_r: axes=(X Y Z)
        BodyScale ulna_l: axes=(X Y Z)
        BodyScale radius_l: axes=(X Y Z)
        BodyScale hand_l: axes=(X Y Z)
      Measurement thigh: apply=true
        MarkerPair: markers=(LHip LKnee)
        MarkerPair: markers=(RHip RKnee)
        BodyScale femur_r: axes=(X Y Z)
        BodyScale patella_r: axes=(X Y Z)
        BodyScale femur_l: axes=(X Y Z)
        BodyScale patella_l: axes=(X Y Z)
      Measurement shank: apply=true
        MarkerPair: markers=(LKnee LAnkle)
        MarkerPair: markers=(RKnee RAnkle)
        BodyScale tibia_r: axes=(X Y Z)
        BodyScale tibia_l: axes=(X Y Z)
      Measurement pelvis: apply=true
        MarkerPair: markers=(RHip LHip)
        BodyScale pelvis: axes=(X Y Z)
        BodyScale sacrum: axes=(X Y Z)
    ScaleSet:
      Scale: scales=(0.95 0.95 0.95) segment=pelvis apply=false
      Scale: scales=(0.85 0.85 0.85) segment=patella_r apply=false
      Scale: scales=(0.85 0.85 0.85) segment=talus_r apply=false
      Scale: scales=(0.85 0.85 0.85) segment=toes_r apply=false
      Scale: scales=(0.85 0.85 0.85) segment=patella_l apply=false
      Scale: scales=(0.85 0.85 0.85) segment=talus_l apply=false
      Scale: scales=(0.85 0.85 0.85) segment=toes_l apply=false
      Scale: scales=(0.8 0.8 0.8) segment=torso apply=false
      Scale: scales=(0.8 0.8 0.8) segment=head apply=false
  MarkerPlacer:
    apply: true
    marker_file: /Users/mathieubourgeois/Desktop/Analyse_Markerless_nomarker/Traitement_Markerless_nomarker/Sujet_08/Static_OpenSimTheia_Sujet_08_Tpose_nomarkers_filt.trc
    time_range: 0.2 1.5
    output_model_file: /Users/mathieubourgeois/Desktop/Analyse_Markerless_nomarker/Traitement_Markerless_nomarker/Sujet_08/Sujet_08_scale_model.osim
    max_marker_movement: -1
    IKTaskSet:
      IKMarkerTask Nose: apply=false weight=0.1
      IKMarkerTask Head: apply=false weight=0.1
      IKMarkerTask Neck: apply=true weight=1
      IKMarkerTask LShoulder: apply=true weight=2
      IKMarkerTask RShoulder: apply=true weight=2
      IKMarkerTask LElbow: apply=true weight=1
      IKMarkerTask RElbow: apply=true weight=1
      IKMarkerTask LWrist: apply=true weight=1
      IKMarkerTask RWrist: apply=true weight=1
      IKMarkerTask Hip: apply=true weight=1
      IKMarkerTask LHip: apply=true weight=2
      IKMarkerTask RHip: apply=true weight=2
      IKMarkerTask LKnee: apply=true weight=1
      IKMarkerTask RKnee: apply=true weight=1
      IKMarkerTask LAnkle: apply=true weight=1
      IKMarkerTask RAnkle: apply=true weight=1
      IKMarkerTask LBigToe: apply=false weight=1
      IKMarkerTask LSmallToe: apply=true weight=1
      IKMarkerTask LHeel: apply=false weight=1
      IKMarkerTask RBigToe: apply=false weight=1
      IKMarkerTask RSmallToe: apply=true weight=1
      IKMarkerTask RHeel: apply=false weight=1
      IKCoordinateTask pelvis_tilt: apply=true weight=1 value_type=default_value value=0
      IKCoordinateTask pelvis_list: apply=true weight=1 value_type=default_value value=0
      IKCoordinateTask ankle_angle_r: apply=true weight=1 value_type=manual_value value=0
      IKCoordinateTask ankle_angle_l: apply=true weight=1 value_type=manual_value value=0
      IKCoordinateTask L5_S1_Flex_Ext: apply=true weight=1 value_type=default_value value=0
