# OpenSim document version 40000
InverseKinematicsTool OpenSimTheia_Sujet_08_velo_100_nomarkers_filt:
  time_range: 0.008 14.983
  output_motion_file: /Users/mathieubourgeois/Desktop/Analyse_Markerless_nomarker/Traitement_Markerless_nomarker/Sujet_08/IKResults/OpenSimTheia_Sujet_08_velo_100_nomarkers_filt_ik.mot
  marker_file: /Users/mathieubourgeois/Desktop/Analyse_Markerless_nomarker/Traitement_Markerless_nomarker/Sujet_08/Data/OpenSimTheia_Sujet_08_velo_100_nomarkers_filt.trc
  report_marker_locations: false
  IKTaskSet:
    IKMarkerTask Neck: apply=true weight=0.2
    IKMarkerTask LShoulder: apply=true weight=2
    IKMarkerTask RShoulder: apply=true weight=2
    IKMarkerTask LElbow: apply=true weight=1
    IKMarkerTask RElbow: apply=true weight=1
    IKMarkerTask LWrist: apply=true weight=1
    IKMarkerTask RWrist: apply=true weight=1
    IKMarkerTask Hip: apply=true weight=1
    IKMarkerTask LHip: apply=true weight=2
    IKMarkerTask RHip: apply=true weight=2
    IKMarkerTask LKnee: apply=true weight=1
    IKMarkerTask RKnee: apply=true weight=1
    IKMarkerTask LAnkle: apply=true weight=1
    IKMarkerTask RAnkle: apply=true weight=1
    IKMarkerTask LSmallToe: apply=true weight=1
    IKMarkerTask RSmallToe: apply=true weight=1
    IKCoordinateTask L5_S1_Flex_Ext: apply=true weight=1 value_type=default_value value=0
